// COMSOL Multiphysics 6.3.0.420 model "axialpotential.mph"
// Outline of the model tree

Parameters
  I_Insert = 6000[A]
  I_Phaedrus = 17300[A]
  I_W7 = 8650[A]

Functions
  lsq1: LeastSquares "FittedPotential" (disabled)
    importedname = phi_interpolation.csv
    filecolumns = 2
    filename = C:\Users\tbpet\WHAM\Simulations\phi_interpolation.csv
    columnKeys = {col1, col2}
    columnType = {col1, arg, col2, value}
    funcs = {col1, lsq1_fun1, col2, lsq1_fun1}
    args = {col1, x1, col2, x2}
    unit = {col1, m, col2, V}
    exprs = {col1, 1, col2, a6*(x1-0.59)^6+a4*(x1-0.59)^4+a2*(x1-0.59)^2}
    pname = {a2, a4, a6}
    plist = {-87.1550079187, 1206.4073757006001, -86219.0740012153}
    scale = {1, 1}
    lbound = {, }
    ubound = {, }
    trained_ninput = 15
    trained_noutput = 1
    trained_info = //funcnames:lsq1_fun1//nrOfFittedPoints:15//relResLsq:0.0209043886965//trainedtime:Apr 29, 2026, 1:53:30 AM//trainingtime:1 s

Coordinate systems
  ie1: InfiniteElement "Infinite Element Domain 1" on domains 1, 2 | ScalingType = Spherical

Geometry
  geom1 "CoilGeometry" (3D, length unit m)
    wp1: WorkPlane "RotationProfile" | quickplane = yz; unite = on; workplane3d = off
      r2: Rectangle "North Insert Spool" | size = {0.0049, 0.1048}; base = center; pos = {0.05785, 0.8742}
      r3: Rectangle "South Insert Spool" | size = {0.0049, 0.1048}; base = center; pos = {0.05785, -0.8742}
      r4: Rectangle "North Insert Winding" | size = {0.0762, 0.1048}; base = center; pos = {0.0984, 0.8742}
      r5: Rectangle "South Insert Winding" | size = {0.0762, 0.1048}; base = center; pos = {0.0984, -0.8742}
      r6: Rectangle "North Phaedrus" | size = {0.213, 0.216}; base = center; pos = {0.284, 0.8742}
      r7: Rectangle "South Phaedrus" | size = {0.213, 0.216}; base = center; pos = {0.284, -0.8742}
      r8: Rectangle "North W7" | size = {0.4, 0.185}; base = center; pos = {0.75, 0.2}
      r9: Rectangle "South W7" | size = {0.4, 0.185}; base = center; pos = {0.75, -0.2}
      c1: Circle
        r = 2.5
        angle = 180
        rot = 270
        layername = Layer 1
        layer = 0.25
        layernameold = Layer 1
        iscircularsectorold = on
      r10: Rectangle "Particle Source" | size = {0.01, 0.001}; base = center; pos = {.005, 0.5737}
      r11: Rectangle "End Plate Termination Boundary" (disabled) | size = {0.25, 0.02}; base = center; pos = {0.125, 2.01}
      r12: Rectangle "Reflection Termination Boundary" | size = {0.17, 0.02}; base = center; pos = {0.085, 0.5}
      r13: Rectangle | size = {.17, 0.4722}; pos = {0, 0.51}
    rev1: Revolve | workplane = wp1; input = wp1; angtype = full
    imp3: Import "Flux Tube"
      type = cad
      filename = C:\Users\tbpet\WHAM\Simulations\ShortenedFluxTube.SLDPRT
      lengthunittype = cad
      assemblycomponentstype = cad
      virtualgeometrytype = cad
      objectstoimporttype = cad
      layerstype = cad
      drillholestype = cad
      componentsstype = cad
      compattrtag = imp3.component
      cellstype = cad
      arcrecognitiontype = cad
      simplifytype = cad
      cadtype = SOLIDWORKS
    imp4: Import "FluxTubeShell"
      type = cad
      filename = C:\Users\tbpet\WHAM\Simulations\ShortenedFluxTubeShell.SLDPRT
      lengthunittype = cad
      assemblycomponentstype = cad
      virtualgeometrytype = cad
      objectstoimporttype = cad
      layerstype = cad
      drillholestype = cad
      componentsstype = cad
      compattrtag = imp4.component
      cellstype = cad
      arcrecognitiontype = cad
      simplifytype = cad
      cadtype = SOLIDWORKS
    cyl1: Cylinder "BoreTerminationBoundary" | r = 0.0554; h = 0.01; pos = {0, 0, 0.8742}
    fin: Finalize "Form Union"
  pgeom_cpt "Geometry 2" (1D, length unit m)
    pt1: Point

Materials
  mat3: Common "Perfect vacuum" on all domains
    def: def "Basic"
      density = 0[kg/m^3]
      relpermeability = 1
      relpermittivity = 1
      electricconductivity = 0[S/m]
  mat2: Common "Copper" on domains 4-7, 10-13
    def: def "Basic"
      relpermeability = 1
      electricconductivity = 5.998e7[S/m]
      thermalexpansioncoefficient = 17e-6[1/K]
      heatcapacity = 385[J/(kg*K)]
      relpermittivity = 1
      density = 8960[kg/m^3]
      thermalconductivity = 400[W/(m*K)]
    Enu: Enu "Young's modulus and Poisson's ratio"
      E = 110[GPa]
      nu = 0.35
    linzRes: linzRes "Linearized resistivity"
      rho0 = 1.72e-8[ohm*m]
      alpha = 0.0039[1/K]
      Tref = 298[K]

Physics
  mf: InductionCurrents "Magnetic Fields" on all domains
    dependent variable A = {Ax, Ay, Az}
    fsp1: FreeSpace (default) | sigma_stab_mat = automatic
    mi1: MagneticInsulation (default)
    init1: init "Initial Values 1" (default)
    coil10: Coil "NorthInsertSpool" on domains 13
      ConductorModel = Multi
      CoilType = Circular
      CoilName = NorthInsertSpool
      ICoil = I_Insert
      N = 1
      materialType = from_mat
      cre1: CoilReferenceEdge "Coil Geometry 1" on edges 95, 96, 186, 272
    coil11: Coil "SouthInsertSpool" on domains 12
      ConductorModel = Multi
      CoilType = Circular
      CoilName = SouthInsertSpool
      ICoil = I_Insert
      N = 1
      materialType = from_mat
      cre1: CoilReferenceEdge "Coil Geometry 1" on edges 88, 89, 95, 96, 181, 186, 267, 272
    coil12: Coil "NorthInsertWinding" on domains 11
      ConductorModel = Multi
      CoilType = Circular
      CoilName = NorthInsertWinding
      ICoil = I_Insert
      N = 161
      HarmonicLoss = 0
      materialType = from_mat
      cre1: CoilReferenceEdge "Coil Geometry 1" on edges 74, 75, 81, 82, 171, 176, 275, 278
    coil9: Coil "SouthInsertWinding" on domains 10
      ConductorModel = Multi
      CoilType = Circular
      CoilName = SouthInsertWinding
      ICoil = I_Insert
      N = 161
      HarmonicLoss = 0
      materialType = from_mat
      cre1: CoilReferenceEdge "Coil Geometry 1" on edges 74, 75, 171, 275
    coil13: Coil "NorthPhaedrus" on domains 7
      ConductorModel = Multi
      CoilType = Circular
      CoilName = NorthPhaedrus
      ICoil = I_Phaedrus
      N = 32
      HarmonicLoss = 0
      materialType = from_mat
      cre1: CoilReferenceEdge "Coil Geometry 1" on edges 46, 47, 74, 75, 152, 171, 275, 299
    coil14: Coil "SouthPhaedrus" on domains 6
      ConductorModel = Multi
      CoilType = Circular
      CoilName = SouthPhaedrus
      ICoil = I_Phaedrus
      N = 32
      HarmonicLoss = 0
      materialType = from_mat
      cre1: CoilReferenceEdge "Coil Geometry 1" on edges 39, 40, 46, 47, 74, 75, 147, 152, 171, 275, 296, 299
    coil15: Coil "NorthW7" on domains 5
      ConductorModel = Multi
      CoilType = Circular
      CoilName = NorthW7
      ICoil = I_W7
      N = 25
      HarmonicLoss = 0
      materialType = from_mat
      cre1: CoilReferenceEdge "Coil Geometry 1" on edges 22, 23, 46, 47, 74, 75, 136, 152, 171, 275, 299, 315
    coil16: Coil "SouthW7" on domains 4
      ConductorModel = Multi
      CoilType = Circular
      CoilName = SouthW7
      ICoil = I_W7
      N = 25
      HarmonicLoss = 0
      materialType = from_mat
      cre1: CoilReferenceEdge "Coil Geometry 1" on edges 15, 16, 22, 23, 46, 47, 74, 75, 131, 136, 152, 171, 275, 299, 312, 315
  cpt: ChargedParticleTracing on domains 1, 2, 8, 9, 14-17
    dependent variable q2 = {q2x, q2y, q2z}
    EquationForm.form = Transient
    ParticleReleaseSpecification.ParticleReleaseSpecification = SpecifyCurrent
    wall1: Wall (default) | WallCondition = Disappear
    pp1: ParticleProperties "Proton" | ParticleSpecies = Proton
    mf1: MagneticForce on domains 1-17 | B_src = root.WHAMR_Regime.mf.Bx
    inl1: Inlet on boundaries 89, 90, 140, 154
      InitialPosition = Density
      N = 15000
      VelocitySpecification = Thermal
      InitialKineticEnergy = Expression
      v0 = {0, 0, 1.4e5}
      L0 = {0, 0, 1}
      Ep0 = 100[eV]
      SpecifyInletTangentialNormal = 0
      T_src = userdef
      T = 1.16e6 [K]
    dacc1: DomainAccumulator "Density Accumulator" on domains 16
      AccumulateOver = ElementsAndTime
      R = 1
      ParticleSelection = ParticleProperties
      ReleasedParticleProperties = pp1
    ef1: ElectricForce (disabled) on domains 16
      SpecifyForceUsing = ElectricPotential
      V_src = userdef
      V = lsq1_fun1(z)*if(z>=0.59,1,0)*if(z<=0.88,1,0)
    wall2: Wall "BoreWall" on boundaries 86 | WallCondition = Disappear

Mesh
  mesh1 "Mesh 1"
    size: MeshSizeDefault | hmin = 0.02; hauto = 3
    ftet1: FreeTet "Free Tetrahedral 1" on entire geometry
      size1: Size on domains 16 | hmax = 0.13; hmin = 0.001; hnarrow = 0.1; hgrad = 1.35; hauto = 2; custom = on

Studies
  std1 "Study 1"
    stat: Stationary | solve for = {mf}
    time: Transient "Time Dependent" | tlist = range(0,5e-7,2e-5); solve for = {cpt}

Solver configurations
  sol2 "Solution 2" (study std1)
    v1: Variables "Dependent Variables 1"
    s1: Stationary "Stationary Solver 1"
      fc1: FullyCoupled
      i1: Iterative
        asamg1: AuxiliarySpaceAMG
    su1: StoreSolution "Solution Store 1"
    v2: Variables "Dependent Variables 2"
    t1: Time "Time-Dependent Solver 1" | tstepsgenalpha = strict
      fc1: FullyCoupled
      i1: Iterative
        ja1: Jacobi
  sol3 "Solution Store 1" (study std1)

Datasets
  dset2: Solution | solution = sol2
  dset3: Solution | solution = sol3
  part2: Particle
    solution = sol2
    pgeomspec = fromphysics
    pgeom = pgeom_cpt
    posdof = {Coils.q2x, Coils.q2y, Coils.q2z}
    physicsinterface = cpt
  cln1: CutLine3D | data = dset2; genpoints = {{-1.81336, 1.68144, -0.336771}, {-1.64521, 1.52645, 1.09294}}

Derived values
  int1: IntVolume "Density Volume Integration" on domains 16
    data = part2
    table = tbl1
    expr = {cpt.rpd*if(z>=0.58,1,0)*if(z<=0.6,1,0), cpt.rpd*if(z>=0.6,1,0)*if(z<=0.62,1,0), cpt.rpd*if(z>=0.62,1,0)*if(z<=0.64,1,0), cpt.rpd*if(z>=0.64,1,0)*if(z<=0.66,1,0), cpt.rpd*if(z>=0.66,1,0)*if(z<=0.68,1,0), cpt.rpd*if(z>=0.68,1,0)*if(z<=0.7,1,0), cpt.rpd*if(z>=0.7,1,0)*if(z<=0.72,1,0), cpt.rpd*if(z>=0.72,1,0)*if(z<=0.74,1,0), cpt.rpd*if(z>=0.74,1,0)*if(z<=0.76,1,0), cpt.rpd*if(z>=0.76,1,0)*if(z<=0.78,1,0), cpt.rpd*if(z>=0.78,1,0)*if(z<=0.8,1,0), cpt.rpd*if(z>=0.8,1,0)*if(z<=0.82,1,0), cpt.rpd*if(z>=0.82,1,0)*if(z<=0.84,1,0), cpt.rpd*if(z>=0.84,1,0)*if(z<=0.86,1,0), cpt.rpd*if(z>=0.86,1,0)*if(z<=0.88,1,0)}
    unit = {m^3, m^3, m^3, m^3, m^3, m^3, m^3, m^3, m^3, m^3, m^3, m^3, m^3, m^3, m^3}
  int2: IntVolume "Volume Integration" on domains 16
    data = dset2
    table = tbl2
    expr = {1*if(z>=0.58,1,0)*if(z<=0.6,1,0), 1*if(z>=0.6,1,0)*if(z<=0.62,1,0), 1*if(z>=0.62,1,0)*if(z<=0.64,1,0), 1*if(z>=0.64,1,0)*if(z<=0.66,1,0), 1*if(z>=0.66,1,0)*if(z<=0.68,1,0), 1*if(z>=0.68,1,0)*if(z<=0.7,1,0), 1*if(z>=0.7,1,0)*if(z<=0.72,1,0), 1*if(z>=0.72,1,0)*if(z<=0.74,1,0), 1*if(z>=0.74,1,0)*if(z<=0.76,1,0), 1*if(z>=0.76,1,0)*if(z<=0.78,1,0), 1*if(z>=0.78,1,0)*if(z<=0.8,1,0), 1*if(z>=0.8,1,0)*if(z<=0.82,1,0), 1*if(z>=0.82,1,0)*if(z<=0.84,1,0), 1*if(z>=0.84,1,0)*if(z<=0.86,1,0), 1*if(z>=0.86,1,0)*if(z<=0.88,1,0)}
    unit = {m^3, m^3, m^3, m^3, m^3, m^3, m^3, m^3, m^3, m^3, m^3, m^3, m^3, m^3, m^3}

Tables
  tbl1: Table "density"
    // Density Volume Integration
    Time (s) | cpt.rpd*if(z>=0.58,1,0)*if(z<=0.6,1,0) (m^3) | cpt.rpd*if(z>=0.6,1,0)*if(z<=0.62,1,0) (m^3) | cpt.rpd*if(z>=0.62,1,0)*if(z<=0.64,1,0) (m^3) | cpt.rpd*if(z>=0.64,1,0)*if(z<=0.66,1,0) (m^3) | cpt.rpd*if(z>=0.66,1,0)*if(z<=0.68,1,0) (m^3) | cpt.rpd*if(z>=0.68,1,0)*if(z<=0.7,1,0) (m^3) | cpt.rpd*if(z>=0.7,1,0)*if(z<=0.72,1,0) (m^3) | cpt.rpd*if(z>=0.72,1,0)*if(z<=0.74,1,0) (m^3) | cpt.rpd*if(z>=0.74,1,0)*if(z<=0.76,1,0) (m^3) | cpt.rpd*if(z>=0.76,1,0)*if(z<=0.78,1,0) (m^3) | cpt.rpd*if(z>=0.78,1,0)*if(z<=0.8,1,0) (m^3)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
    2e-05 | 0.00590059 | 0.00521035 | 0.00465216 | 0.00415734 | 0.00365132 | 0.0032028 | 0.00273286 | 0.00224007 | 0.00180853 | 0.00145327 | 0.00113957
  tbl2: Table "volume"
    // Volume Integration
    Time (s) | 1*if(z>=0.58,1,0)*if(z<=0.6,1,0) (m^3) | 1*if(z>=0.6,1,0)*if(z<=0.62,1,0) (m^3) | 1*if(z>=0.62,1,0)*if(z<=0.64,1,0) (m^3) | 1*if(z>=0.64,1,0)*if(z<=0.66,1,0) (m^3) | 1*if(z>=0.66,1,0)*if(z<=0.68,1,0) (m^3) | 1*if(z>=0.68,1,0)*if(z<=0.7,1,0) (m^3) | 1*if(z>=0.7,1,0)*if(z<=0.72,1,0) (m^3) | 1*if(z>=0.72,1,0)*if(z<=0.74,1,0) (m^3) | 1*if(z>=0.74,1,0)*if(z<=0.76,1,0) (m^3) | 1*if(z>=0.76,1,0)*if(z<=0.78,1,0) (m^3) | 1*if(z>=0.78,1,0)*if(z<=0.8,1,0) (m^3)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
    2e-05 | 5.90072e-06 | 5.22959e-06 | 4.65775e-06 | 4.17527e-06 | 3.65074e-06 | 3.19942e-06 | 2.77281e-06 | 2.2783e-06 | 1.87858e-06 | 1.52344e-06 | 1.23433e-06

Plots
  pg4: PlotGroup3D "Magnetic Flux Density (mf) 2" | data = dset2
    slc1: Slice | expr = mf.normB; quickxnumber = 1
    str1: Streamline
      expr = {mf.Bx, mf.By, mf.Bz}
      startmethod = coord
      xcoord = 0
      ycoord = range(-0.18,0.02,0.18)
      zcoord = 0
  pg5: PlotGroup3D "Particle Trajectories (cpt)" | data = part2
    traj1: ParticleTrajectories
      col1: Color "Color Expression 1" | expr = cpt.pidx
  pg9: PlotGroup1D "Accumulated Density on Axis"
    data = dset2
    title = Accumulated Density
    xlabel = Axial Particle Trajectory Length (m)
    ylabel = Accumulated Density
    lngr1: LineGraph on edges 226, 229 | expr = cpt.rpd
  pg8: PlotGroup3D "Accumulated Ion Density" | data = dset2
    slc1: Slice | expr = cpt.rpd
  pg10: PlotGroup3D "Potential" on domains 16, 17 | data = dset2
    slc1: Slice | expr = lsq1_fun1(z)*if(z>=0.59,1,0)*if(z<=0.88,1,0); quickxnumber = 1
  pg13: PlotGroup1D "Number of Particle Existing Over Time" | data = dset2
    glob1: Global | expr = cpt.mpsum/mp_const

Exports
  data1: Data "RawIonDensity"
    data = dset2
    expr = cpt.rpd
    descr = Accumulated variable rpd
    filename = C:\Users\tbpet\WHAM\Simulations\RawIonDensity1.txt
    sort = on
    includenan = off
  tbl1: Table "density export" | table = tbl1; filename = C:\Users\tbpet\WHAM\Simulations\density_integral.csv
  tbl2: Table "volume export" | table = tbl2; filename = C:\Users\tbpet\WHAM\Simulations\slice_volume.csv
  anim1: Animation | giffilename = C:\Users\tbpet\particles.gif; maxframes = 15; frametime = 0.2
  anim2: Animation | giffilename = C:\Users\tbpet\density.gif; maxframes = 20; frametime = 0.2